<?xml version="1.0" encoding="UTF-8"?>
<channelml xmlns="http://morphml.org/channelml/schema"
	   xmlns:xsi="http://www.w3.org/2001/XMLSchema-instance"
	   xmlns:meta="http://morphml.org/metadata/schema"
	   xsi:schemaLocation="http://morphml.org/channelml/schema http://www.neuroml.org/NeuroMLValidator/NeuroMLFiles/Schemata/v1.8.1/Level2/ChannelML_v1.8.1.xsd"
	   units="Physiological Units">

    <meta:notes>AOB Mitral Cell R-Type Calcium Channel</meta:notes>

    <channel_type name="CaV_R_iAMC_ChannelML">

      <status value="stable">
	<meta:comment>R-Type Calcium Channel from an intrinsically oscillating AOB mitral cell from parameters recorded in the lab of M. Spehr RWTH Aachen</meta:comment>
            <meta:contributor>
                <meta:name>Simon O'Connor</meta:name>
            </meta:contributor>
      </status>

      <meta:notes>A High Voltage Activated Ca2+ channel</meta:notes>

        <meta:authorList>
            <meta:modelTranslator>
                <meta:name>Simon O'Connor</meta:name>
                <meta:institution>UH</meta:institution>
                <meta:email>simon.oconnor - at - btinternet.com</meta:email>
            </meta:modelTranslator>
        </meta:authorList>

      <meta:neuronDBref>
	<meta:modelName>Calcium channels</meta:modelName>
	<meta:uri>http://senselab.med.yale.edu/neurondb/channelGene2.aspx#table1</meta:uri>
      </meta:neuronDBref>

      <current_voltage_relation cond_law="ohmic" ion="ca" default_gmax="0.15" default_erev="80" charge="2" fixed_erev="yes">                     <!-- In the orig model, [Ca] alterations didn't alter erev for channel from 80mV -->

      <gate name="m" instances="2">
	<closed_state id="m0"/>
	<open_state id="m"/>

                <time_course name="tau" from="m0" to="m" expr_form="generic" expr="v &lt; -30 ? 28.4118 : 3.1738 + (25.238 * (exp(-1 * ((v + 30)/17.498))))"/>
                <steady_state name="inf" from="m0" to="m" expr_form="sigmoid" rate="1" scale="-2.0914" midpoint="-38.037"/>

      </gate>

      <gate name="h" instances="1">
	<closed_state id="h0"/>
	<open_state id="h"/>

                <time_course name="tau" from="h0" to="h" expr_form="generic" expr="v &lt; -30 ? 21.0638148543 : 10.8 + (3.0 * (exp(-1 * ((v+20)/8.13))))"/>
                <steady_state name="inf" from="h0" to="h" expr_form="generic" expr="((1/(1+(exp(-1 * (v-(-38.037))/-2.0914)))) + (0.6928/(1+(exp(-1 * (v-(-38.037))/2.0914)))))"/>

      </gate>
    </current_voltage_relation>

   </channel_type>
</channelml>
