<?xml version="1.0" encoding="UTF-8"?>
<channelml xmlns="http://morphml.org/channelml/schema" xmlns:xsi="http://www.w3.org/2001/XMLSchema-instance" xmlns:meta="http://morphml.org/metadata/schema" xsi:schemaLocation="http://morphml.org/channelml/schema http://www.neuroml.org/NeuroMLValidator/NeuroMLFiles/Schemata/v1.8.1/Level2/ChannelML_v1.8.1.xsd" units="Physiological Units">

    <meta:notes>ChannelML file containing a single Channel description</meta:notes>

    <channel_type name="Kdr_mod1_iAMC_ChannelML" density="yes">

        <status value="in_progress">
            <meta:comment>Delayed rectifier potassium channel from an inrinsically oscillating AOB mitral cell from parameters recorded in the lab of M. Spehr RWTH Aachen</meta:comment>
            <meta:contributor>
                <meta:name>Simon O'Connor</meta:name>
            </meta:contributor>
        </status>

        <meta:notes>Mitral cell K DR channel</meta:notes>

        <meta:neuronDBref>
            <meta:modelName>K channels</meta:modelName>
            <meta:uri>http://senselab.med.yale.edu/neuronDB/channelGene2.aspx#table3</meta:uri>
        </meta:neuronDBref>

        <current_voltage_relation cond_law="ohmic" ion="k" default_gmax="1.0" default_erev="-86.5" charge="1">

            <gate name="m" instances="1">
                <closed_state id="m0"/>
                <open_state id="m" fraction="1"/>

                <time_course name="tau" from="m0" to="m" expr_form="generic" expr="v &lt; -66.67 ? 230.256604897 : 29.156*exp(-(v+55)/5.8842) + 18.394"/>
                <steady_state name="inf" from="m0" to="m" expr_form="generic" expr="v &lt; -66.67 ? 0 : 0.005*v + 0.35"/>

	    </gate>

	    <gate name="n" instances="1">
		<closed_state id="n0"/>
		<open_state id="n"/>

		<time_course name="tau" from="n0" to="n" expr_form="generic" expr="1.5"/>
		<!--time_course name="tau" from="n0" to="n" expr_form="generic" expr="v &lt; -66.67 ? 25.3445130355 : 8.69 +(12/(exp((v + 60.97)/17.39)))"/-->
		<steady_state name="inf" from="n0" to="n" expr_form="generic" expr="v &lt; 5 ? 0 : ((-0.006*v) + 0.40)"/>

	    </gate>
        </current_voltage_relation>

        <impl_prefs>
            <table_settings max_v="100" min_v="-100" table_divisions="400"/>
        </impl_prefs>

    </channel_type>
</channelml>
