<?xml version="1.0" encoding="UTF-8"?>
<channelml xmlns="http://morphml.org/channelml/schema" xmlns:xsi="http://www.w3.org/2001/XMLSchema-instance" xmlns:meta="http://morphml.org/metadata/schema" xsi:schemaLocation="http://morphml.org/channelml/schema  http://www.neuroml.org/NeuroMLValidator/NeuroMLFiles/Schemata/v1.8.1/Level2/ChannelML_v1.8.1.xsd" units="Physiological Units">

    <meta:notes>AOB Mitral Cell Fast Sodium ion Channel</meta:notes>

    <channel_type name="NaT_iAMC_ChannelML" density="yes">

        <status value="stable">
            <meta:comment>Sodium Fast conductance (transient, inactivating) from an intrinsically oscillating AOB mitral cell from parameters recorded in the lab of M. Spehr RWTH Aachen</meta:comment>
            <meta:contributor>
                <meta:name>Simon O'Connor</meta:name>
            </meta:contributor>
        </status>

        <meta:notes>Na Channel</meta:notes>

        <meta:authorList>
            <meta:modelTranslator>
                <meta:name>Simon O'Connor</meta:name>
                <meta:institution>UH</meta:institution>
                <meta:email>simon.oconnor - at - btinternet.com</meta:email>
            </meta:modelTranslator>
        </meta:authorList>

        <current_voltage_relation cond_law="ohmic" ion="na" default_gmax="120" default_erev="50" charge="1">

            <gate name="m" instances="3">
                <closed_state id="m0"/>
                <open_state id="m" fraction="1"/>

                <time_course name="tau" from="m0" to="m" expr_form="generic" expr="1/((exp((v+58.76)/95.73))+(exp((-v-894.17)/30.70)))  "/>
                        <!--steady_state name="inf" from="h0" to="h" expr_form="sigmoid" rate="1" scale="-30" midpoint="-46.742"/-->

                <steady_state name="inf" from="h0" to="h" expr_form="sigmoid" rate="1" scale="-17.793" midpoint="-46.742"/>

	    </gate>

            <gate name="h" instances="1">
                <closed_state id="h0"/>
                <open_state id="h" fraction="1"/>

                <time_course name="tau" from="h0" to="h" expr_form="generic" expr="1/((exp((v-34.14)/142.45))+(exp((-v-67.39)/10.72)))  "/>
                        <!--steady_state name="inf" from="h0" to="h" expr_form="sigmoid" rate="1" scale="14" midpoint="-41.89"/-->

		<steady_state name="inf" from="h0" to="h" expr_form="sigmoid" rate="1" scale="7.0168" midpoint="-41.89"/>

		</gate>
        </current_voltage_relation>

        <impl_prefs>
            <table_settings max_v="100" min_v="-100" table_divisions="2000"/>
        </impl_prefs>

    </channel_type>
</channelml>
