<?xml version="1.0" encoding="ISO-8859-1"?>
<neuroml xmlns="http://www.neuroml.org/schema/neuroml2" xmlns:xsi="http://www.w3.org/2001/XMLSchema-instance" xsi:schemaLocation="http://www.neuroml.org/schema/neuroml2 https://raw.github.com/NeuroML/NeuroML2/development/Schemas/NeuroML2/NeuroML_v2beta4.xsd" id="ka">

    <notes>ChannelML file based on parameters recorded in the lab of M. Spehr RWTH Aachen</notes>

    <ionChannel id="na" conductance="10pS" type="ionChannelHH" species="na">

	<notes>Sodium Fast conductance (transient, inactivating) from an intrinsically oscillating AOB mitral cell from parameters recorded in the lab of M. Spehr RWTH Aachen</notes>

	<annotation>
	    <rdf:RDF xmlns:rdf="http://www.w3.org/1999/02/22-rdf-syntax-ns#">
		<rdf:Description rdf:about="na">

		    <bqmodel:isDescribedBy xmlns:bqmodel="http://biomodels.net/model-qualifiers/">
			<rdf:Bag>
			    <rdf:li>??</rdf:li>
			    <rdf:li rdf:resource="http://www.ncbi.nlm.nih.gov/entrez/query.fcgi?cmd=Retrieve&amp;db=pubmed&amp;dopt=Abstract&amp;list_uids=??"/>
			</rdf:Bag>
		    </bqmodel:isDescribedBy>

		    <bqbiol:isVersionOf xmlns:bqbiol="http://biomodels.net/biology-qualifiers/">
			<rdf:Bag>
			    <rdf:li>Na channels</rdf:li>
			    <rdf:li rdf:resource="http://senselab.med.yale.edu/senselab/NeuronDB/??"/>
			</rdf:Bag>
		    </bqbiol:isVersionOf>

		</rdf:Description>
	    </rdf:RDF>
	</annotation>

	<gate id="m" type="gateHHtauInf" instances="?">
	    <timeCourse type="na_m_tau_tau"/>
	    <steadyState type="HHSigmoidVariable" rate="1" scale="19.8mV" midpoint="-36mV"/>
	</gate>

	<gate id="h" type="gateHHtauInf" instances="?">
	    <timeCourse type="na_h_tau_tau"/>
	    <steadyState type="HHSigmoidVariable" rate="1" scale="-8.4mV" midpoint="-68.8mV"/>
	</gate>

    </ionChannel>

	  <gate id="h" type="gateHHtauInf" instances="?">
	      <timeCourse type="??"/>
	          <!--1/((exp((V-42.57)/70.82))+(exp((-V-107.53)/70.82))) A=-42.57 B=70.82 C=107.53-->
	  </gate>

    <ComponentType name="na_m_tau_tau" extends="baseVoltageDepTime">
	<Constant name="TIME_SCALE" dimension="time" value="1 ms"/>
	<Constant name="VOLT_SCALE" dimension="voltage" value="1 mV"/>

	<Dynamics>
	    <DerivedVariable name="V" dimension="none" value="v / VOLT_SCALE"/>
	    <DerivedVariable name="t" exposure="t" dimension="time" value="1/((exp((V+A)/B))+(exp((-V-C)/B))) * TIME_SCALE"/>
	</Dynamics>

    </ComponentType>

    <ComponentType name="ka_h_tau_tau" extends="baseVoltageDepTime">
	<Constant name="TIME_SCALE" dimension="time" value="1 ms"/>
	<Constant name="VOLT_SCALE" dimension="voltage" value="1 mV"/>

	<Dynamics>
	    <DerivedVariable name="V" dimension="none" value="v / VOLT_SCALE"/>
	    <ConditionalDerivedVariable name="t" exposure="t" dimension="time">
		  <Case condition="V .lt. ( ? )" value="1/((exp((V-42.57)/70.82))+(exp((-V-107.53)/70.82))) * TIME_SCALE"/>
		  <Case value="( ?) * TIME_SCALE"/>
	    </ConditionalDerivedVariable>
	</Dynamics>

    </ComponentType>

</neuroml>
